*HEADING
** Acoustic Transmission Loss Simulation
** Layered fluid medium with frequency sweep analysis
** Units: m-kg-s-Pa (SI system)
** Frequency range: 100-5000 Hz
** Author: Abaqus Acoustic Simulation
** Date: 2024

*NODE
1, 0.0, 0.0
2, 0.0, 0.5
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
*ELEMENT, TYPE=AC2D4
1, 1, 6, 7, 2
2, 2, 7, 8, 3
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
*NSET, NSET=INLET
1, 2, 3, 4, 5

*NSET, NSET=OUTLET
21, 22, 23, 24, 25

*NSET, NSET=PROBE_IN
11, 12, 13, 14, 15

*NSET, NSET=PROBE_OUT
16, 17, 18, 19, 20

*NSET, NSET=TOP_LAYER
1, 2, 3, 4, 5, 6
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
*NSET, NSET=BOTTOM_LAYER
26, 27, 28, 29, 30, 31
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
*ELSET, ELSET=TOP_ELEMENTS
1, 2, 3, 4, 5, 6
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
*ELSET, ELSET=BOTTOM_ELEMENTS
17, 18, 19, 20, 21, 22
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
*MATERIAL, NAME=WATER_TOP
*DENSITY
1025.0
*BULK MODULUS
2.306e9

*MATERIAL, NAME=WATER_BOTTOM
*DENSITY
980.0
*BULK MODULUS
2.162e9

*SOLID SECTION, ELSET=TOP_ELEMENTS, MATERIAL=WATER_TOP
1.0

*SOLID SECTION, ELSET=BOTTOM_ELEMENTS, MATERIAL=WATER_BOTTOM
1.0

*SURFACE, NAME=SURF_INLET
INLET, S1

*SURFACE, NAME=SURF_OUTLET
OUTLET, S1

*STEP, NAME=SSD, NLGEOM=NO
*STEADY STATE DYNAMICS, DIRECT
100.0, 5000.0, 25.0

** Incident wave interaction property
*INCIDENT WAVE INTERACTION PROPERTY, NAME=PLANEWAVE
*INCIDENT WAVE FLUID PROPERTY
1025.0, 1500.0

** Incident wave interaction
*INCIDENT WAVE INTERACTION, NAME=INC1, PROPERTY=PLANEWAVE
SURF_INLET, 1.0, 0.0, 0.0

** Non-reflecting impedance boundaries
*IMPEDANCE, TYPE=NONREFLECTING
SURF_OUTLET

** Field output requests
*OUTPUT, FIELD, FREQUENCY=1
*NODE OUTPUT
P

** History output requests
*OUTPUT, HISTORY, FREQUENCY=1
*NODE PRINT, NSET=PROBE_IN
P
*NODE PRINT, NSET=PROBE_OUT
P

*END STEP
